# Title: Шаблон MathCad для расчетов
# Description: Шаблон включает в себя настроенные единицы измерения для России, стили текста.
tonf := 1000 kgf
E := 10000 MPa
MN = 1000000 N
cm = 0.01 m
cm = 0.01 m
## Расчет основания фундамента
## Определение расчетного сопротивления грунта основания
γ_c1 := 1.4
γ_c2 := 1.4  # - коэффициенты условий работы, принимаемые по таблице 5.4;
# - коэффициент, принимаемый равным единице, если прочностные характеристики грунта (II и сII) определены непосредственными испытаниями, и k = 1,1, если они приняты по таблицам приложения 5.5;
k := 1.1
M_γ := 0.56
M_q := 3.24
M_c := 5.84  # - коэффициенты, принимаемые по таблице 5.5;
k_z := 8 m/(16.4 m) + 0.2 = 0.687805
# - коэффициент, принимаемый равным единице при b < 10 м; kz = z0/b + 0,2 при b  10 м (здесь z0 = 8 м);
k_z := 0.68
b := 16.4 m  # - ширина подошвы фундамента, м (при бетонной или щебеночной подготовке толщиной hn допускается увеличивать b на 2hn);
γ_II := 2070*kgf/m^3
# - осредненное (см. ) расчетное значение удельного веса грунтов, залегающих ниже подошвы фундамента (при наличии подземных вод определяется с учетом взвешивающего действия воды), кН/м3;
γ'_II := 1800*kgf/m^3  # - то же, для грунтов, залегающих выше подошвы фундамента, кН/м3;
# - расчетное значение удельного сцепления грунта, залегающего непосредственно под подошвой фундамента (см. 5.6.10), кПа;
c_II  := 14 kPa
# - глубина заложения фундаментов, м, бесподвальных сооружений от уровня планировки или приведенная глубина заложения наружных и внутренних фундаментов от пола подвала, определяемая по формуле (5.8). При плитных фундаментах за d_1 принимают наименьшую глубину от подошвы плиты до уровня планировки;
d_1 := 7 m
d_b := 2 m
# - глубина подвала, расстояние от уровня планировки до пола подвала, м (для сооружений с подвалом глубиной свыше 2 м принимают равным 2 м); d_1 = hs + hcfcf/'II,
# здесь hs - толщина слоя грунта выше подошвы фундамента со стороны подвала, м;
# hcf - толщина конструкции пола подвала, м;
# cf - расчетное значение удельного веса конструкции пола подвала, кН/м3.
# При бетонной или щебеночной подготовке толщиной hn допускается увеличивать d1 на hn.
R_грунт := γ_c1*γ_c2/k*(M_γ*k_z*b*γ_II + M_q*d_1*γ'_II + (M_q - 1)*d_b*γ'_II + M_c*c_II ) = 1.22582 MPa
γ_c1*γ_c2/k*(M_γ*k_z*b*γ_II + M_q*d_1*γ'_II + (M_q - 1)*d_b*γ'_II + M_c*c_II ) explicit, γ_c1, γ_c2, k, M_γ, k_z, b, γ_II, M_q, d_1, γ'_II, d_b, M_c, c_II  → 1.4*1.4/1.1*(0.56*0.68*16.4*m*2070*kgf/m^3 + 3.24*7*m*1800*kgf/m^3 + (3.24 - 1)*2*m*1800*kgf/m^3 + 5.84*14*kPa) = 1.22582 MPa
## Расчет осадки фундамента
# s - осадка основания фундамента (совместная деформация основания и сооружения);
# su - предельное значение осадки основания фундамента
γ' := 20.7*kN/m^3
d_n := 4.15 m
γ'*d_n = 85.905 kPa
n := 30
i := 1 .. n
h[i] := 3.28 m
z[i] := h[i]*i
b := 16.4 m
β := 0.8
γ_m[i] := 21*kN/m^3
σ_zg[i] := γ'*d_n + sum(γ_m[i]*h[i], i = 1 .. i)
p_0 := 8.7*tonf/m^2 = 85.3179 kPa
E[i] := 33.5 MPa
ξ[i] := 2*z[i]/b
σ_zg0 := γ'*d_n
α[1] := 0.977
α[2] := 0.878
α[3] := 0.744
α[4] := 0.621
α[5] := 0.518
α[6] := 0.435
α[7] := 0.367
α[8] := 0.313
α[9] := 0.269
α[10] := 0.232
α[11] := 0.203
α[12] := 0.178
α[13] := 0.157
α[14] := 0.139
α[15] := 0.124
α[16] := 0.111
α[17] := 0.1
α[18] := 0.091
α[19] := 0.082
α[20] := 0.076
α[21] := 0.203
α[22] := 0.178
α[23] := 0.157
α[24] := 0.139
α[25] := 0.124
α[26] := 0.111
α[27] := 0.1
α[28] := 0.091
α[29] := 0.082
α[30] := 0.076
σ_zp[i] := α[i]*p_0
σ_zγ[i] := σ_zg0*α[i]
s := β*sum((σ_zp[i] - σ_zγ[i])*h[i]/E[i], i = 1 .. n) + β*sum(σ_zp[i]*h[i]/E[i], i = 1 .. n)
s[i] := β*σ_zp[i]*h[i]/E[i]
σ_zp.ср[i] := (σ_zp[i] + σ_zp[i - 1])/2
γ_m[i] = [21; 21; 21; 21; 21; 21; 21; 21; 21; 21; 21; 21; 21; 21; 21; 21; 21; 21; 21; 21; 21; 21; 21; 21; 21; 21; 21; 21; 21; 21] kN/m^3
h[i] = [3.28; 3.28; 3.28; 3.28; 3.28; 3.28; 3.28; 3.28; 3.28; 3.28; 3.28; 3.28; 3.28; 3.28; 3.28; 3.28; 3.28; 3.28; 3.28; 3.28; 3.28; 3.28; 3.28; 3.28; 3.28; 3.28; 3.28; 3.28; 3.28; 3.28] m
z[i] = [3.28; 6.56; 9.84; 13.12; 16.4; 19.68; 22.96; 26.24; 29.52; 32.8; 36.08; 39.36; 42.64; 45.92; 49.2; 52.48; 55.76; 59.04; 62.32; 65.6; 68.88; 72.16; 75.44; 78.72; 82; 85.28; 88.56; 91.84; 95.12; 98.4] m
ξ[i] = [0.4; 0.8; 1.2; 1.6; 2; 2.4; 2.8; 3.2; 3.6; 4; 4.4; 4.8; 5.2; 5.6; 6; 6.4; 6.8; 7.2; 7.6; 8; 8.4; 8.8; 9.2; 9.6; 10; 10.4; 10.8; 11.2; 11.6; 12]
α[i] = [0.977; 0.878; 0.744; 0.621; 0.518; 0.435; 0.367; 0.313; 0.269; 0.232; 0.203; 0.178; 0.157; 0.139; 0.124; 0.111; 0.1; 0.091; 0.082; 0.076; 0.203; 0.178; 0.157; 0.139; 0.124; 0.111; 0.1; 0.091; 0.082; 0.076]
σ_zg[i] = [154.785; 223.665; 292.545; 361.425; 430.305; 499.185; 568.065; 636.945; 705.825; 774.705; 843.585; 912.465; 981.345; 1050.22; 1119.11; 1187.98; 1256.87; 1325.74; 1394.62; 1463.51; 1532.38; 1601.27; 1670.14; 1739.03; 1807.9; 1876.79; 1945.66; 2014.55; 2083.43; 2152.3] kPa
σ_zp[i] = [83.3555; 74.9091; 63.4765; 52.9824; 44.1946; 37.1133; 31.3117; 26.7045; 22.9505; 19.7937; 17.3195; 15.1866; 13.3949; 11.8592; 10.5794; 9.47028; 8.53179; 7.76392; 6.99606; 6.48416; 17.3195; 15.1866; 13.3949; 11.8592; 10.5794; 9.47028; 8.53179; 7.76392; 6.99606; 6.48416] kPa
σ_zp.ср[i] = [41.6778; 79.1323; 69.1928; 58.2294; 48.5885; 40.654; 34.2125; 29.0081; 24.8275; 21.3721; 18.5566; 16.2531; 14.2907; 12.627; 11.2193; 10.0248; 9.00103; 8.14786; 7.37999; 6.74011; 11.9018; 16.2531; 14.2907; 12.627; 11.2193; 10.0248; 9.00103; 8.14786; 7.37999; 6.74011] kPa
0.2*σ_zg[i] = [30.957; 44.733; 58.509; 72.285; 86.061; 99.837; 113.613; 127.389; 141.165; 154.941; 168.717; 182.493; 196.269; 210.045; 223.821; 237.597; 251.373; 265.149; 278.925; 292.701; 306.477; 320.253; 334.029; 347.805; 361.581; 375.357; 389.133; 402.909; 416.685; 430.461] kPa
s[i] = [6.5291; 5.8675; 4.97201; 4.15002; 3.46169; 2.90702; 2.45259; 2.09172; 1.79768; 1.55041; 1.35661; 1.18954; 1.0492; 0.92891; 0.828668; 0.741792; 0.668281; 0.608135; 0.54799; 0.507893; 1.35661; 1.18954; 1.0492; 0.92891; 0.828668; 0.741792; 0.668281; 0.608135; 0.54799; 0.507893] mm
